x[1] := 6*15
y[1] := 6*15
x[2] := 6*15
y[2] := 8*15
x[3] := 8*15
y[3] := 6*15
x[4] := x[1]
y[4] := y[1]
ϕ := 90
ϕ_rad := ϕ*π/180
dx2 := 2*15
dy2 := 3*15
T(dx, dy) := [1, 0, -dx; 0, 1, -dy; 0, 0, 1]
R(ϕ) := [cos(ϕ), sin(ϕ), 0; -sin(ϕ), cos(ϕ), 0; 0, 0, 1]
K := [x[1], x[2], x[3]; y[1], y[2], y[3]; 1, 1, 1]
K1 := T(x[1], y[1])*K
x1[1] := K1[0, 0]
x1[2] := K1[0, 1]
x1[3] := K1[0, 2]
x1[4] := K1[0, 0]
y1[1] := K1[1, 0]
y1[2] := K1[1, 1]
y1[3] := K1[1, 2]
y1[4] := K1[1, 0]
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K1 = [0, 0, 30; 0, 30, 0; 1, 1, 1]
K2 := R(ϕ_rad)*K1
x1[1] := K2[0, 0]
x1[2] := K2[0, 1]
x1[3] := K2[0, 2]
x1[4] := K2[0, 0]
y1[1] := K2[1, 0]
y1[2] := K2[1, 1]
y1[3] := K2[1, 2]
y1[4] := K2[1, 0]
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K3 := T(-dx2, -dy2)*K2
x1[1] := K3[0, 0]
x1[2] := K3[0, 1]
x1[3] := K3[0, 2]
x1[4] := K3[0, 0]
y1[1] := K3[1, 0]
y1[2] := K3[1, 1]
y1[3] := K3[1, 2]
y1[4] := K3[1, 0]
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K4 := T(-x[1], -y[1])*K3
x1[1] := K4[0, 0]
x1[2] := K4[0, 1]
x1[3] := K4[0, 2]
x1[4] := K4[0, 0]
y1[1] := K4[1, 0]
y1[2] := K4[1, 1]
y1[3] := K4[1, 2]
y1[4] := K4[1, 0]
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